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/batch
! ANSYS input file written by Workbench version 17.2 RELEASE
! File used for geometry attach: /home/vitaliy/Documents/wb/3d_files/dp0/SYS/DM/SYS.agdb
/title,3d--Static Structural (A5)
/com,--- Data in consistent MKS units. See Solving Units in the help system for more information.
/units,MKS
/prep7
! Turn off shape checking because checks already performed inside WB mesher.
! See help system for more information.
SHPP,OFF,,NOWARN
etcon,set             ! allow ANSYS to choose best KEYOP's for 180x elements
/com,*********** Nodes for the whole assembly ***********
nblock,3
(1i9,3e20.9e3)
        1     5.000000000E-01     3.000000000E-01     0.000000000E+00
        2     5.000000000E-01     5.000000000E-01     2.000000000E-01
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-1
/com,*********** Elements for Body 1 "Solid" ***********
et,1,185
eblock,19,solid,,1416
(19i9)
        1        1        1        1        0        0        0        0        8        0        1      249      412      275      275      254      254      254      254
        1        1        1        1        0        0        0        0        8        0        2      341      369      412      412      347      347      347      347
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-1
/com,*********** Elements for Body 2 "Solid" ***********
et,2,185
eblock,19,solid,,150
(19i9)
        2        2        1        2        0        0        0        0        8        0     1417      166      407      509      509      167      167      167      167
        2        2        1        2        0        0        0        0        8        0     1418       35      186       36       36      504      504      504      504
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-1
/com,*********** Elements for Body 3 "Solid" ***********
et,3,185
eblock,19,solid,,134
(19i9)
        3        3        1        3        0        0        0        0        8        0     1567      208      212      210      210      511      511      511      511
        3        3        1        3        0        0        0        0        8        0     1568      180      181      511      511      401      401      401      401
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-1
/com,*********** Send User Defined Coordinate System(s) ***********
csys,0
toffst,273.15,  ! Temperature offset from absolute zero
/com,*********** Set Reference Temperature ***********
tref,22.
/com,*********** Send Materials ***********
MP,DENS,1,7850,	! kg m^-3
MP,ALPX,1,1.2e-05,	! C^-1
MP,C,1,434,	! J kg^-1 C^-1
MP,KXX,1,60.5,	! W m^-1 C^-1
MP,RSVX,1,1.7e-07,	! kg m^3 A^-2 s^-3
MP,EX,1,200000000000,	! Pa
MP,NUXY,1,0.3,
MP,MURX,1,10000,

MP,DENS,2,7850,	! kg m^-3
MP,ALPX,2,1.2e-05,	! C^-1
MP,C,2,434,	! J kg^-1 C^-1
MP,KXX,2,60.5,	! W m^-1 C^-1
MP,RSVX,2,1.7e-07,	! kg m^3 A^-2 s^-3
MP,EX,2,200000000000,	! Pa
MP,NUXY,2,0.3,
MP,MURX,2,10000,

MP,DENS,3,7850,	! kg m^-3
MP,ALPX,3,1.2e-05,	! C^-1
MP,C,3,434,	! J kg^-1 C^-1
MP,KXX,3,60.5,	! W m^-1 C^-1
MP,RSVX,3,1.7e-07,	! kg m^3 A^-2 s^-3
MP,EX,3,200000000000,	! Pa
MP,NUXY,3,0.3,
MP,MURX,3,10000,

!************************* Model Summary ********************
!Solid,	Structural Steel,	matid,	1
!Solid,	Structural Steel,	matid,	2
!Solid,	Structural Steel,	matid,	3
!************************* End Model Summary ********************
/com,*********** Send Named Selection as Node Component ***********
CMBLOCK,FIX     ,NODE,       89
(8i10)
         1         2         3         4         5         6         7         8
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/com,*********** Send Named Selection as Node Component ***********
CMBLOCK,DISP    ,NODE,       87
(8i10)
        25        26        27        28        29        30        31        32
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/com,*********** Send Named Selection as Element Component ***********
esel,none
esel,a,mat,,1
cm,MATRIX,elem
esel,all
/com,*********** Send Named Selection as Element Component ***********
esel,none
esel,a,mat,,2
esel,a,mat,,3
cm,ARM,elem
esel,all
/com,*********** Fixed Supports ***********
CMBLOCK,_FIXEDSU,NODE,       89
(8i10)
         1         2         3         4         5         6         7         8
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cmsel,s,_FIXEDSU
d,all,all
nsel,all
nsel,all
/com,*********** Create Displacement Tables and Functions ******

*DIM,_loadvari35xp,TABLE,2,1,1,TIME,
! Time values
_loadvari35xp(1,0,1) = 0.
_loadvari35xp(2,0,1) = 1.
! Load values
_loadvari35xp(1,1,1) = 0.
_loadvari35xp(2,1,1) = 1.e-003


*DIM,_loadvari35xn,TABLE,2,1,1,TIME,
! Time values
_loadvari35xn(1,0,1) = 0.
_loadvari35xn(2,0,1) = 1.
! Load values
_loadvari35xn(1,1,1) = 0.
_loadvari35xn(2,1,1) = -1.e-003

fini
/com,****************************************************************************
/com,*************************    SOLUTION       ********************************
/com,****************************************************************************
/solu
antype,0                   ! static analysis
eqsl,pcg,1e-8,,,,,,1
cntr,print,1               ! print out contact info and also make no initial contact an error
dmpopt,emat,no             ! Don't combine emat file for DANSYS
dmpopt,esav,no             ! Don't combine esav file for DANSYS
nldiag,cont,iter           ! print out contact info each equilibrium iteration
resc,,none                 ! Do not keep any restart files
/com,****************************************************
/com,******************* SOLVE FOR LS 1 ****************
/com,*** Set Displacements ***
CMBLOCK,_CM35UX_XP,NODE,       87
(8i10)
        25        26        27        28        29        30        31        32
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cmsel,s,_CM35UX_XP
d,all,ux,%_loadvari35xp%
nsel,all

/com,*** Component For All Non-Zero UX Displacements ***
cmsel,s,_CM35ux_xp
cm,_DISPNONZEROUX,NODE
nsel,all

nsub,1,1,1
time,1.
outres,erase
outres,all,none
outres,nsol,all
outres,rsol,all
outres,strs,all
outres,epel,all
outres,eppl,all
stabilize,off                   ! Stabilization turned OFF by user
! *********** WB SOLVE COMMAND ***********
! check interactive state
*get,ANSINTER_,active,,int
*if,ANSINTER_,ne,0,then
/eof
*endif
solve
/com *************** Write FE CONNECTORS *********
CEWRITE,file,ce,,INTE
/com,****************************************************
/com,*************** FINISHED SOLVE FOR LS 1 *************
*set,_DS_PROGRESS          ! turn off progress updates to avoid virus scanning bug
*get,_PCGITER,active,,solu,cgiter
/post1
fini
