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/batch
! ANSYS input file written by Workbench version 19.1 RELEASE
! File used for geometry attach: C:\Users\vitaliy.schetinin\AppData\Local\Temp\WB_AE-W1_vitaliy.schetinin_10956_2\unsaved_project_files\dp0\SYS\DM\SYS.agdb
/title,unsaved_project--Static Structural (A5)
/com,--- Data in consistent MKS units. See Solving Units in the help system for more information.
/units,MKS
/prep7
! Turn off shape checking because checks already performed inside WB mesher.
! See help system for more information.
SHPP,OFF,,NOWARN
etcon,set             ! allow ANSYS to choose best KEYOP's for 180x elements
/com,*********** Nodes for the whole assembly ***********
nblock,3,,2043
(1i9,3e20.9e3)
        1     7.000000000E-01     5.000000000E-01     1.000000000E+00
        2     6.770912051E-01     4.070553656E-01     1.000000000E+00
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-1
/com,*********** Elements for Body 1 "Solid" ***********
et,1,185
eblock,19,solid,,7934
(19i9)
        1        1        1        1        0        0        0        0        8        0        1      156     1650      326      326     1552     1552     1552     1552
        1        1        1        1        0        0        0        0        8        0        2      866     1088     1358     1358     1357     1357     1357     1357
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-1
/com,*********** Elements for Body 2 "Solid" ***********
et,2,185
eblock,19,solid,,1052
(19i9)
        2        2        1        2        0        0        0        0        8        0     7935      177      182     1788     1788      207      207      207      207
        2        2        1        2        0        0        0        0        8        0     7936      221      222     1803     1803     1799     1799     1799     1799
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-1
/com,*********** Send User Defined Coordinate System(s) ***********
csys,0
toffst,273.15,  ! Temperature offset from absolute zero
/com,*********** Set Reference Temperature ***********
tref,22.
/com,*********** Send Materials ***********
Temperature = 'TEMP' ! Temperature
MP,DENS,1,7850,	! kg m^-3
MP,ALPX,1,1.2e-05,	! C^-1
MP,C,1,434,	! J kg^-1 C^-1
MP,KXX,1,60.5,	! W m^-1 C^-1
MP,RSVX,1,1.7e-07,	! kg m^3 A^-2 s^-3
MP,EX,1,200000000000,	! Pa
MP,NUXY,1,0.3,
MP,MURX,1,10000,

Temperature = 'TEMP' ! Temperature
MP,DENS,2,7850,	! kg m^-3
MP,ALPX,2,1.2e-05,	! C^-1
MP,C,2,434,	! J kg^-1 C^-1
MP,KXX,2,60.5,	! W m^-1 C^-1
MP,RSVX,2,1.7e-07,	! kg m^3 A^-2 s^-3
MP,EX,2,500000000000,	! Pa
MP,EY,2,10000000000,	! Pa
MP,EZ,2,10000000000,	! Pa
MP,PRXY,2,0.3,
MP,PRYZ,2,0.2,
MP,PRXZ,2,0.3,
MP,GXY,2,3850000000,	! Pa
MP,GYZ,2,4000000000,	! Pa
MP,GXZ,2,3850000000,	! Pa
MP,MURX,2,10000,

!************************* Model Summary ********************
!Solid,	Structural Steel,	matid,	1
!Solid,	Structural Steel 2,	matid,	2
!************************* End Model Summary ********************
/com,*********** Send Named Selection as Node Component ***********
CMBLOCK,X0      ,NODE,      133
(8i10)
        27        28        29        30        31        32        33        34
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/com,*********** Send Named Selection as Node Component ***********
CMBLOCK,X1      ,NODE,      128
(8i10)
        38        48        49        50        51        52        53        54
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
/com,*********** Fixed Supports ***********
CMBLOCK,_FIXEDSU,NODE,      133
(8i10)
        27        28        29        30        31        32        33        34
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cmsel,s,_FIXEDSU
d,all,all
nsel,all
/com,*********** Create Displacement Tables and Functions ******

*DIM,_loadvari51xp,TABLE,2,1,1,TIME,
! Time values
_loadvari51xp(1,0,1) = 0.
_loadvari51xp(2,0,1) = 1.
! Load values
_loadvari51xp(1,1,1) = 0.
_loadvari51xp(2,1,1) = 1.e-002


*DIM,_loadvari51xn,TABLE,2,1,1,TIME,
! Time values
_loadvari51xn(1,0,1) = 0.
_loadvari51xn(2,0,1) = 1.
! Load values
_loadvari51xn(1,1,1) = 0.
_loadvari51xn(2,1,1) = -1.e-002

fini
/com,****************************************************************************
/com,*************************    SOLUTION       ********************************
/com,****************************************************************************
/solu
antype,0                   ! static analysis
eqsl,pcg,1e-8,,,,,,1
cntr,print,1               ! print out contact info and also make no initial contact an error
dmpoption,emat,no             ! Don't combine emat file for DANSYS
dmpoption,esav,no             ! Don't combine esav file for DANSYS
nldiag,cont,iter           ! print out contact info each equilibrium iteration
rescontrol,,none                 ! Do not keep any restart files
/com,****************************************************
/com,******************* SOLVE FOR LS 1 OF 1 ****************
/com,*** Set Displacements ***
CMBLOCK,_CM51UX_XP,NODE,      128
(8i10)
        38        48        49        50        51        52        53        54
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
cmsel,s,_CM51UX_XP
d,all,ux,%_loadvari51xp%
nsel,all

/com,*** Component For All Non-Zero UX Displacements ***
cmsel,s,_CM51ux_xp
cm,_DISPNONZEROUX,NODE
nsel,all

nsub,1,1,1
time,1.
outres,erase
outres,all,none
outres,nsol,all,
outres,rsol,all
outres,strs,all,
outres,epel,all,
outres,eppl,all,
stabilize,off                   ! Stabilization turned OFF by user
! *********** WB SOLVE COMMAND ***********
! check interactive state
*get,ANSINTER_,active,,int
*if,ANSINTER_,ne,0,then
/eof
*endif
solve
/com *************** Write FE CONNECTORS *********
CEWRITE,file,ce,,INTE
/com,****************************************************
/com,*************** FINISHED SOLVE FOR LS 1 *************
*get,_PCGITER,active,,solu,cgiter
/post1
fini
